<neuroml xmlns="http://www.neuroml.org/schema/neuroml2"  xmlns:xs="http://www.w3.org/2001/XMLSchema" xmlns:xsi="http://www.w3.org/2001/XMLSchema-instance" xsi:schemaLocation="http://www.neuroml.org/schema/neuroml2 https://raw.github.com/NeuroML/NeuroML2/development/Schemas/NeuroML2/NeuroML_v2.3.1.xsd" id="Worm2D">
    <expOneSynapse id="syn0" gbase="65nS" erev="0mV" tauDecay="3ms"/>
    <iafCell id="iaf0" leakReversal="-65mV" thresh="-50mV" reset="-65mV" C="1.0 nF" leakConductance="10 nS"/>
    <network id="IafNet">
        <population id="IafPop0" component="iaf0" size="60"/>
        <projection id="ChemicalProj" presynapticPopulation="IafPop0" postsynapticPopulation="IafPop0" synapse="syn0">
            <connectionWD id="0" preCellId="../IafPop0/0/iaf0" postCellId="../IafPop0/0/iaf0" weight="-2.528311446261591" delay="0ms"/>
            <connectionWD id="1" preCellId="../IafPop0/2/iaf0" postCellId="../IafPop0/0/iaf0" weight="-14.672044016483778" delay="0ms"/>
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        </projection>
        <electricalProjection id="ElectricalProj" presynapticPopulation="IafPop0" postsynapticPopulation="IafPop0">
            <electricalConnectionInstanceW id="0" preCell="../IafPop0/7/iaf0" postCell="../IafPop0/1/iaf0" weight="0.111893748558795"/>
            <electricalConnectionInstanceW id="1" preCell="../IafPop0/8/iaf0" postCell="../IafPop0/2/iaf0" weight="1.626882458649384"/>
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        </electricalProjection>
    </network>
</neuroml>
